V_REF := 1.255 V
R_1 := 10 kΩ
R_2 := 37.4 kΩ
V_out := V_REF/R_1*(R_1 + R_2) = 5.9487 V
C_F := 1.5 nF
f_zero := 1/(2*π*(R_2*C_F)) = 2.83699 kHz
V_in := 5 V
D := (V_out - V_in)/V_out = 0.15948
L1 := 4.7 μH
Delta_i_L := V_in/(2*L1)*D*1/(520 kHz) = 0.163134 A
