# Crystal Design for MCU:
# https://www.st.com/resource/en/application_note/an2867-guidelines-for-oscillator-design-on-stm8afals-and-stm32-mcusmpus-stmicroelectronics.pdf
C_L := 12*pF  # // specified by the Xtal datasheet
C_S1 := 5*pF  # // stray capacitance of the PCB and connections
C_L1 := (C_L - C_S1)*2 = 14 pF
C_S2 := 4*pF
C_L2 := (C_L - C_S2)*2 = 16 pF
